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x := 2
n := 10
y(n) := (sqrt(x^3 + n) + cos(|n*x - 1|)^2)/(nthroot(x^5 + sin(x) + n, 4)*cos(π/4*(x + n)))
y(n) = -2.03961
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x := 7
y := 10
z := -3
p := if(x > y, sin(x) + 3*|y| - z^2, (y + 3)/sqrt(z^2 + 1)*ln(|x + 1|)) = 8.5485
q := if(x > y and x < 1, cos(x) + 2*|y + 1| - z, (x*y + 3)/sqrt(y^2 + 5)) = 7.12407
w := if(x < y or y ≥ 10, x^2 + 2*(y*x + 1) - z, (x^-3*y^2 + 3)*sqrt(z^2 + 7)) = 194
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x := -2, 1.6 .. 2
n := 10
f(x, n) := (x^2 + n*x + sin(x))*sqrt(|x - cos(n*x)|)
f(x, n) = [-26.2398; 31.281]
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n := 10
a := -3*n = -30
b := 3*n = 30
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A := runif(3, -3, 3)
B := runif(3, -3, 3)
C := runif(3, -3, 3)
A = [-2.83313; -1.15655; -2.14391]
B = [-2.59283; 1.34952; 1.16411]
C = [0.92936; -2.41012; -2.70209]
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# Без использования Шаблонов
s := sum(A[i]*B[i], i = 0 .. 2) = 3.28928
V := [B[1]*C[2] - B[2]*C[1]; B[2]*C[0] - B[0]*C[2]; B[0]*C[1] - B[1]*C[0]] = [-0.840885; -5.92419; 4.99484]
Vect := [A[1]*B[2] - A[2]*B[1]; A[2]*B[0] - A[0]*B[2]; A[0]*B[1] - A[1]*B[0]] = [1.5469; 8.85688; -6.82211]
w := A[0]*V[0] + A[1]*V[1] + A[2]*V[2] = -1.47453
# C использованием шаблонов MathCad
s := A*B = 3.28928
V := B×C = [-0.840885; -5.92419; 4.99484]
w := (A×B)*C = -1.47453
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lengtA := sqrt(sum(A[i]^2, i = 0 .. 2)) = 3.73638
lengtB := sqrt(sum(B[i]^2, i = 0 .. 2)) = 3.14629
lengtC := sqrt(sum(C[i]^2, i = 0 .. 2)) = 3.73814
Result :=
    "Это A" if lengtA > lengtB and lengtA > lengtC
    "Это B" if lengtB > lengtA and lengtB > lengtC
    "Это C" if lengtC > lengtB and lengtC > lengtA
# Вектор с наибольшей длинной:
Result = "Это C"
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a := -10
N := 10
b := 10
i := 0 .. N
k := b - a + 1 = 21
j := 0 .. N
M[i, j] := round(a + k*rnd(1))
M = [
    9, 5, 4, -3, -4, -8, 8, -7, -8, 3, 1;
    -1, 0, -7, 5, 7, 8, -4, -7, 6, 3, -8;
    4, -8, -5, 9, 4, 0, 0, 1, 4, 3, -10;
    -8, 8, 6, -2, 2, 10, -6, -7, 10, -9, -9;
    -7, 8, 5, -10, 5, -5, -6, -3, -2, 7, 1;
    7, -7, -2, -7, -9, 2, 2, -3, 7, -4, 9;
    6, -2, -5, -5, 1, -9, 1, -8, 9, -7, 10;
    -9, -3, -2, 10, 1, 5, -5, 1, -2, 2, 4;
    -1, -10, 3, 2, -5, -10, -8, 8, 7, 5, 1;
    -7, 5, -9, 4, -8, 10, -4, 11, -4, -2, -5;
    -5, 9, 9, -8, -6, 6, -6, -10, -8, -3, -9
]
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Sum := sum(sum(M[i, j], j), i) = -68
SumPol := sum(sum(if(M[i, j] > 0, M[i, j], 0), j), i) = 303
SumOtr := sum(sum(if(M[i, j] < 0, M[i, j], 0), j), i) = -371
X := M[:, 0]
Y := transpose(M)[:, cols(M) - 1]
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X*Y = 258
X = [9; -1; 4; -8; -7; 7; 6; -9; -1; -7; -5]
Y = [-5; 9; 9; -8; -6; 6; -6; -10; -8; -3; -9]
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x1 := -3*π
x2 := 3*π
y(x3) := e^(-(|x3|/3))*cos(x3)
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x := -9, -8.75 .. 9
f(x) :=
    e^x*x^3 if x < 0
    e^(-x)*x^3 if x ≥ 0
x = [
    -9; -8.75; -8.5; -8.25; -8; -7.75; -7.5; -7.25; -7; -6.75
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]
f(x) = [
    -0.0899657; -0.106157; -0.124955; -0.146701; -0.171757; -0.200504; -0.233332; -0.270632; -0.312776; -0.3601
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]
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Δx := π/4
x1 := -2*π
x2 := 2*π
n := (x2 - x1)/Δx = 16
i := 0 .. n
x[i] := x1 + i*Δx
g(x) := sqrt(|x|)*sin(x)
X[i] := x[i]
Y[i] := g(x[i])
X[i] = [-6.28319; -5.49779; -4.71239; -3.92699; -3.14159; -2.35619; -1.5708; -0.785398; 0; 0.785398; 1.5708; 2.35619; 3.14159; 3.92699; 4.71239; 5.49779; 6.28319]
Y[i] = [0; 1.65798; 2.1708; 1.40125; 0; -1.0854; -1.25331; -0.626657; 0; 0.626657; 1.25331; 1.0854; 0; -1.40125; -2.1708; -1.65798; 0]
WRITEPRN("X.txt") := X
WRITEPRN("Y.txt") := Y
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XX := READPRN("X.txt")
YY := READPRN("Y.txt")
XX = [-6.283; -5.498; -4.712; -3.927; -3.142; -2.356; -1.571; -0.7854; 0; 0.7854; 1.571; 2.356; 3.142; 3.927; 4.712; 5.498; 6.283]
YY = [0; 1.658; 2.171; 1.401; 0; -1.085; -1.253; -0.6267; 0; 0.6267; 1.253; 1.085; 0; -1.401; -2.171; -1.658; 0]
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q(x) := e^(-x^2)
x := -3, -2.99 .. 3
p(x) := d/dx(q(x))
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f(x, y) := sin(sqrt(x^2 + y^2))/sqrt(x^2 + y^2)
# [component: inputs f]
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x1 := -5
x2 := 5
Δx := 0.1
f(x) := x^2 + (x - 2)*sin(x) - 5
x := x1, x1 + Δx .. x2
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x := -4
x1 := root(f(x), x) = -1.32936
f(x1) = 0
x := 2
x2 := root(f(x), x) = 2.19967
f(x2) = 3.52607e-13
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f(x) := x^2 + x*sin(2*x) - (x - 5)*cos(x)
x1 := -4
x2 := 4
Δx := 0.1
x := x1, x1 + Δx .. x2
x1 := root(f(x), x, -4, -2) = -2.97354
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f(x1) = -1.77636e-15
x2 := root(f(x), x, -2, 0) = -1.93283
f(x2) = 0
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n := 10
f(x) := x^3 + (4 - n)*x^2 + (3 - 4*n)*x - 3*n
V := [-3*n; 3 - 4*n; 4 - n; 1] = [-30; -37; -6; 1]
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X := polyroots(V) = [-3; -1; 10]
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n := 10
# 1. Матричным методом
K := [n, n + 1, n + 2; n - 3, n - 2, n; n - 1, n, n + 1] = [10, 11, 12; 7, 8, 10; 9, 10, 11]
|K| = -1
B := [6*n + 8; 6*n - 7; 6*n + 2] = [68; 53; 62]
X := K^-1*B = [1; 2; 3]
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# 2. С использованием блока Given ... Find
x := 0
y := 0
z := 0
Given
n*x + (n + 1)*y + (n + 2)*z == 6*n + 8
(n - 3)*x + (n - 2)*y + n*z == 6*n - 7
(n - 1)*x + n*y + (n + 1)*z == 6*n + 2
X := Find(x, y, z)
X = [1; 2; 3]
# 3. Выполнить проверку найденного решения
x := X[0] = 1
y := X[1] = 2
z := X[2] = 3
K*X = [68; 53; 62]
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x^2/81 + y^2/16 == 1
(x - 9)^2 + (y - 2)^2 == 25
i := 0, 0.01 .. 2*π
xE(i) := 9*cos(i)
xO(i) := 9 + 5*cos(i)
yE(i) := 4*sin(i)
yO(i) := 2 + 5*sin(i)
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x := 3
y := 5
Given
x^2/81 + y^2/16 == 1
(x - 9)^2 + (y - 2)^2 == 25
V := Find(x, y) = [4.23934; 3.52845]
x := 10
y := -1
Given
x^2/81 + y^2/16 == 1
(x - 9)^2 + (y - 2)^2 == 25
V := Find(x, y) = [6.9308; -2.55175]
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x := 0, 0.1 .. 10
f(x) := x*sin(x)
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x := 2
x1_max := Maximize(f, x) = 2.02876
y1_max := f(x1_max) = 1.81971
x := 5
x1_max := Minimize(f, x) = 4.91318
y1_max := f(x1_max) = -4.81447
x := 8
x1_max := Maximize(f, x) = 7.97867
y1_max := f(x1_max) = 7.91673
